f(x) := x^3 + x - 500  # заданная функция
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# график функции | график действительного корня
x1 := root(f(x), x, -10, 10) = 7.89501
# нахождение корней через root
x2 := root(f(x), x, -1000, 1000) = 7.89501
v := f(x) coeffs → [-500; 1; 0; 1]  # коэффициенты полинома
polyroots(v) = [-3.9475 - 6.91002i; -3.9475 + 6.91002i; 7.89501]  # все корни уравнения
v := f(x) solve → [
    ((sqrt(5062503)/9 + 250)^(2/3) - 1/3)/(sqrt(5062503)/9 + 250)^(1/3);
    (1 - 3*(500*sqrt(5062503)/9 + 3375001/27)^(1/3) + sqrt(3)*1i + 3i*sqrt(3)*(500*sqrt(5062503)/9 + 3375001/27)^(1/3))/(6*(sqrt(5062503)/9 + 250)^(1/3));
    -(3*(500*sqrt(5062503)/9 + 3375001/27)^(1/3) - 1 + sqrt(3)*1i + 3i*sqrt(3)*(500*sqrt(5062503)/9 + 3375001/27)^(1/3))/(6*(sqrt(5062503)/9 + 250)^(1/3))
] = [7.89501; -3.9475 + 6.91002i; -3.9475 - 6.91002i]
n := 10
i := 1, 2 .. 2*n
X[i] := (2*π*i)/(2*n + 1)
X = [0; 0.299199; 0.598399; 0.897598; 1.1968; 1.496; 1.7952; 2.0944; 2.39359; 2.69279; 2.99199; 3.29119; 3.59039; 3.88959; 4.18879; 4.48799; 4.78719; 5.08639; 5.38559; 5.68479; 5.98399]
Y := [-1.24; -1.17; -1.08; -0.96; -0.84; -0.79; -0.8; -0.9; -1.1; -1.21; -1.02; -1.28; -1.32; -1.34; -1.36; -1.37; -1.37; -1.36; -1.35; -1.33; -1.30]
# кусочно линейная интерполяция
scale := 100
j := 0 .. scale
t[j] := min(X) + j*(max(X) - min(X))/scale
fintl(t) := linterp(X, Y, t)
# интерполяция кубическим сплайном
S := cspline(X, Y)
fints(t) := interp(S, X, Y, t)
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A := [2.18, 2.44, 2.49; 2.17, 2.31, 2.49; 3.15, 3.22, 3.17]
B := [-4.34; -3.91; -5.27]
# матричный метод
X := A^-1*B = [1.72486; -3.44037; 0.118196]
Given
x[0] := 0
x[1] := 0
x[2] := 0
2.18*x[0] + 2.44*x[1] + 2.49*x[2] == -4.34
2.17*x[0] + 2.31*x[1] + 2.49*x[2] == -3.91  # методом Find
3.15*x[0] + 3.22*x[1] + 3.17*x[2] == -5.27
res := Find(x)
res = [1.72486; -3.44037; 0.118196]
lsolve(A, B) = [1.72486; -3.44037; 0.118196]  # методом lsolve
ПРОГРАММИРОВАНИЕ
Nerv(x) :=
    maximum ← 0
    for i ∈ 1 .. 600851475143
        for j ∈ 2 .. sqrt(i)
            break if (mod(i, j) == 0)
            maximum ← i
            break
    return maximum
600851475143 factor → 71*839*1471*6857
Nerv(0) =  # error: В экземпляре объекта не задана ссылка на объект.
